// SBML level 3 version 1

model New_Model()
  // model units - substance: substance, time: time, volume: volume, area: area, length: length, extent: substance

  // Compartments:
  compartment compartment = 1 volume;

  // Species:
  species A in compartment = 10;
  species B in compartment = 0;
  species C in compartment = 0;
  species D in compartment = 1;
  species E in compartment = 1;

  // Parameters:
  k1 = 1;
  k2 = 1;
  k3 = 1;
  k4 = 1;
  k5 = 1;
  k6 = 1;
  k7 = 1;
  k8 = 0;

  // Reactions:
  r1: A => B; compartment*k1*A;
  r2: B => C; compartment*k2*B;
  r3: C => B; compartment*k3*C;
  r4: C => D; compartment*k4*C;
  r5: D => C; compartment*k5*D;
  r6: D => E; compartment*k6*D;
  r7: E => D; compartment*k7*E;
  r8: E => ; compartment*k8*E;

  // Unit definitions:
  unit length = metre;
  unit area = metre^2;
  unit volume = litre;
  unit time = second;
  unit substance = mole;
end
